New WireData.OH_TPLX_4 GMRac=0.00202068 GMRunits=m Diam=0.00518922 Radunits=m normamps=145.0 Rac=0.0013648

New WireData.OH_ACSR_336kcmil GMRac=0.0067 GMRunits=m Diam=0.0174 Radunits=m normamps=520.0 Rac=0.0001716
